** Minimal CalculiX verification model: one C3D8 axial patch test
*HEADING
CalculiX installation verification - unit cube in uniaxial tension
*NODE
1, 0., 0., 0.
2, 1., 0., 0.
3, 1., 1., 0.
4, 0., 1., 0.
5, 0., 0., 1.
6, 1., 0., 1.
7, 1., 1., 1.
8, 0., 1., 1.
*ELEMENT, TYPE=C3D8, ELSET=SOLID
1, 1, 2, 3, 4, 5, 6, 7, 8
*NSET, NSET=FIXED
1, 4, 5, 8
*NSET, NSET=LOADED
2, 3, 6, 7
*NSET, NSET=ANCHOR
1
*NSET, NSET=ROLL
4
*MATERIAL, NAME=STEEL
*ELASTIC
210000., 0.3
*SOLID SECTION, ELSET=SOLID, MATERIAL=STEEL
*BOUNDARY
** Restrain axial motion on x=0 while allowing Poisson contraction.
FIXED, 1, 1, 0.
** Remove the remaining rigid translations and rotation about x.
ANCHOR, 2, 3, 0.
ROLL, 3, 3, 0.
*STEP
*STATIC
*CLOAD
LOADED, 1, 250.
*NODE FILE
U, RF
*EL FILE
S, E
*NODE PRINT, NSET=LOADED
U
*NODE PRINT, NSET=FIXED, TOTALS=ONLY, GLOBAL=YES
RF
*END STEP
