** written by FreeCAD inp file writer for CalculiX,Abaqus meshes
** highest dimension mesh elements only.

** Nodes
*Node, NSET=Nall
1, -60, -40, 12
2, -60, -40, 0
3, -60, 40, 12
4, -60, 40, 0
5, 60, -40, 0
6, 60, -40, 12
7, -2.352e-12, -40, 12
8, -1.09834274e-07, 40, 12
9, -43, -30, 12
10, -43, 30, 12
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

** Volume elements
*Element, TYPE=C3D10, ELSET=Evolumes
11684, 21655, 3828, 21966, 23088, 23626, 23624, 23625, 23628, 23627, 23629
11685, 21995, 21541, 21773, 22041, 23632, 23630, 23631, 23634, 23633, 23635
11686, 21668, 21605, 21991, 22419, 23638, 23636, 23637, 23640, 23639, 23641
11687, 22220, 21934, 23121, 23303, 23644, 23642, 23643, 23646, 23645, 23647
11688, 22303, 4372, 3710, 23147, 23649, 6368, 23648, 23651, 23650, 23652
11689, 22483, 4055, 23182, 23267, 23655, 23653, 23654, 23657, 23656, 23658
11690, 4125, 3860, 21754, 22692, 5650, 23659, 23660, 23662, 23661, 23663
11691, 21857, 21772, 22480, 22597, 23666, 23664, 23665, 23668, 23667, 23669
11692, 17993, 1437, 17808, 21793, 18184, 18188, 18189, 23671, 23670, 23672
11693, 21965, 8037, 22107, 23277, 23675, 23673, 23674, 23677, 23676, 23678
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
** Define element set Eall
*ELSET, ELSET=Eall
Evolumes


***********************************************************
** Element sets for materials and FEM element type (solid, shell, beam, fluid)
*ELSET,ELSET=MatSteelSolid
Evolumes

***********************************************************
** constraints fixed node sets
** BoltFix
*NSET,NSET=BoltFix
9,
10,
13,
14,
15,
17,
19,
20,
335,
336,
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
** Physical constants for SI(mm) unit system with Kelvins
*PHYSICAL CONSTANTS, ABSOLUTE ZERO=0, STEFAN BOLTZMANN=5.670374419e-11

***********************************************************
** Materials
** see information about units at file end
** FreeCAD material name: S355
** MatSteel
*MATERIAL, NAME=MatSteel
*ELASTIC
210000,0.3
*EXPANSION, ZERO=0
0

***********************************************************
** Sections
*SOLID SECTION, ELSET=MatSteelSolid, MATERIAL=MatSteel

***********************************************************
** At least one step is needed to run an CalculiX analysis of FreeCAD
*STEP, INC=2000
*STATIC
1.0,1.0,1e-05,1.0

***********************************************************
** Fixed Constraints
** BoltFix
*BOUNDARY
BoltFix,1
BoltFix,2
BoltFix,3


***********************************************************
** constraints force node loads
** BearingLoad
*CLOAD
** node loads on shape: Bracket:Face16
24,1,0
30,1,0
959,1,0
960,1,0
961,1,0
962,1,0
963,1,0
964,1,0
966,1,0
967,1,0
968,1,0
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

***********************************************************
** Outputs --> frd file
*NODE FILE
U
*EL FILE
S, E
** outputs --> dat file
** reaction forces for Constraint fixed
*NODE PRINT, NSET=BoltFix, TOTALS=ONLY
RF

*OUTPUT, FREQUENCY=1
***********************************************************
*END STEP

***********************************************************
** CalculiX Input file
**   written by    --> FreeCAD 1.1.3
**   written on    --> Tue Aug 11 01:45:32 2026
**   file name     --> bracket_fem.FCStd
**   analysis name --> Analysis
**
**
***********************************************************
**  About units:
**  See ccx manual, ccx does not know about any unit.
**  Golden rule: The user must make sure that the numbers they provide have consistent units.
**  The user is the FreeCAD calculix writer module ;-)
**
**  The unit system which is used at Guido Dhondt's company: mm, N, s, K
**  Since Length and Mass are connected by Force, if Length is mm the Mass is in t to get N
**  The following units are used to write to inp file:
**
**  Length: mm (this includes the mesh geometry)
**  Mass: t
**  TimeSpan: s
**  Temperature: K
**
**  This leads to:
**  Force: N
**  Pressure: N/mm^2 == MPa (Young's Modulus has unit Pressure)
**  Density: t/mm^3
**  Gravity: mm/s^2
**  Thermal conductivity: t*mm/K/s^3 == as W/m/K == kW/mm/K
**  Specific Heat: mm^2/s^2/K = J/kg/K == kJ/t/K
**
